Lкнд := 154990
Nтс := 6840*1000 = 6840000
qm := 0.01522
ΛGотб := 0.08
Dср := 0.6276
Gв := 29.89
ηмех := 0.99
n := 8202
Lквд := 258290
Gг := Gв*(1 + qm - ΛGотб) = 27.9537
Nтвд := (Lквд*Gв/ηмех) = 7798271
Uсртс := π*Dср*n/60 = 269.526
Nтнд := (Lкнд*Gв/ηмех) = 4679446
Dн1г := 0.6025
Dвт1г := 0.5283
Dн1тс := 0.7030
Dвт1тс := 0.5521
μzтc := Nтс*1000/(Gв*Uсртс^2) = 3150.12
hг := (Dн1г - Dвт1г)/2 = 0.0371
μzтв1 := 1.75
Nтс*0.65 = 4446000
N1 := (Nтс/μzтc*μzтв1) = 3799.85
hтс := (Dн1тс - Dвт1тс)/2 = 0.07545
Nтс*0.45 = 3078000
μzтв2 := 1.4
Тг := 1318
Dгср := 0.5654
Pт := 1486000
Pтс := 106040
N2 := (Nтс/μzтc*μzтв2) = 3039.88
qλг := Gв*sqrt(Тг)/(0.0396*π*Dгср*hг*Pт) = 0.279827
λг := 0.185
Ns := N1 + N2 = 6839.73
Nтс = 6840000
μzтв1 + μzтв2 = 3.15
Сг := λг*18.132*sqrt(Тг) = 121.78
Тт'' := Тг - (Nтвд + Nтнд + Nтс)/(Gв*1160) = 760.85
Dтсср := 0.6276
qλт := Gв*sqrt(Тт'')/(0.0396*π*Dтсср*hтс*Pтс) = 1.31983
λс := 0.41
Ст := λс*18.132*sqrt(Тт'') = 205.059
