Tk0 := 688.3
Pk0 := 1613000
nквд := 14055
n := 7
Rg := 290
i := 1 .. n
Rc[i] := 0.058, 0.068, 0.097, 0.127, 0.195, 0.263, 0.274
Uc[i] := π*nквд*Rc[i]/30
Uc[i] = [85.3665; 100.085; 142.768; 186.923; 287.008; 387.093; 403.283]
Cp := -1.7287*10^-7*Tk0^3 + 4.1509*10^-4*Tk0^2 - 1.0764*10^-1*Tk0 + 1004.6 = 1070.79
Tc[i] := Tk0 + Uc[i]^2/(2*Cp)
Tc[i] = [691.703; 692.977; 697.818; 704.615; 726.764; 758.267; 764.242]
λ[i] := 2.583*10^-2*e^(0.0009*Tc[i])
μ[i] := 1.8494*10^-5*e^(0.0008*Tc[i])
ρ[i] := Pk0/(Rg*Tc[i])
λ[i] = [0.0481379; 0.0481931; 0.0484035; 0.0487005; 0.0496811; 0.0511098; 0.0513854]
μ[i] = [3.21627e-5; 3.21956e-5; 3.23205e-5; 3.24967e-5; 3.30776e-5; 3.39219e-5; 3.40844e-5]
ρ[i] = [8.04113; 8.02634; 7.97066; 7.89377; 7.6532; 7.33524; 7.27789]
Reω[i] := ρ[i]*Uc[i]*Rc[i]/μ[i]
Nu[i] := 0.0207*Reω[i]^0.8
α[i] := Nu[i]*λ[i]/Rc[i]
Reω[i] = [1237882; 1696675; 3415229; 5766497; 12949031; 22014312; 23594453]
Nu[i] = [1549.22; 1993.65; 3489.04; 5305.18; 10133.5; 15493; 16376.4]
α[i] = [1285.8; 1412.95; 1741.05; 2034.37; 2581.76; 3010.81; 3071.2]
Cp = 1070.79
Rc[i] = [0.058; 0.068; 0.097; 0.127; 0.195; 0.263; 0.274]
Tc[i] = [691.703; 692.977; 697.818; 704.615; 726.764; 758.267; 764.242]
μ[i] = [3.21627e-5; 3.21956e-5; 3.23205e-5; 3.24967e-5; 3.30776e-5; 3.39219e-5; 3.40844e-5]
λ[i] = [0.0481379; 0.0481931; 0.0484035; 0.0487005; 0.0496811; 0.0511098; 0.0513854]
ρ[i] = [8.04113; 8.02634; 7.97066; 7.89377; 7.6532; 7.33524; 7.27789]
Reω[i] = [1237882; 1696675; 3415229; 5766497; 12949031; 22014312; 23594453]
Nu[i] = [1549.22; 1993.65; 3489.04; 5305.18; 10133.5; 15493; 16376.4]
α[i] = [1285.8; 1412.95; 1741.05; 2034.37; 2581.76; 3010.81; 3071.2]
i = [1; 2; 3; 4; 5; 6; 7]
j := 1 .. 5
''nпр''[j] := 0.4, 0.6, 0.8, 1, 1.05
# Температура
Tн := 288
T0кмакспр := Tk0*Tн/288
y := 0.363*x^2 + 0.715*x - 0.08  # disabled
''Tкпр''[j] := 0.363*''nпр''[j]^2 + 0.715*''nпр''[j] - 0.08
Tкпр[j] := ''Tкпр''[j]*Tk0
Tк0[j] := Tкпр[j]/(Tн/288)
Tк0[j] = [181.766; 330.164; 498.549; 686.923; 737.14]
# Давление
y := -91.55*x^4 + 307.4*x^3 - 377.9*x^2 + 203.6*x - 40.66  # disabled
