Nep := 630
α := 0.85
n := 2000  # .Бензин Б-91.115
i := 9
С1 := 0.842
H1 := 0.158
ε := 6.5
Oт := 0
mт := 100
Pк := 0.37*10^6
Sт := 0
Hр := 2100
Тн := 274.35
Hu := 34013*С1 + 102990*H1 = 44911.4
Pн := 0.0785*10^6
Cp := 1.004
k1 := 1.4
Lад := Cp*Тн*((Pк/Pн)^((k1 - 1)/k1) - 1) = 153.515
ηад := 0.68
ΔTк := Lад/(Cp*ηад) = 224.858
Tк := Тн + ΔTк = 499.208
