z := 86
r := 0.305
W1u := 152.8
P1 := 0.772*10^6
C2a := 176.1
W2u := 459.2
C1a := 166
Gв := 27.7
P2 := 0.564*10^6
hл := 0.042
Pа := (2*π*r/z*(P1 - P2)) + (Gв/(hл*z)*(C1a - C2a)) = 4557.49
Pu := (Gв/(hл*z)*(W1u + W2u)) = 4693.36
