Т1w' := 1170
Кпер := -0.08
n := 14055
Pв := 0.771*10^6
Tk' := 688.3
Кср := 0.05
R1 := 290
Квт := -0.15
Tgrf'per := Т1w' + Кпер*(Т1w' - Tk') = 1131.46
Tgrf'CP := Т1w' + Кср*(Т1w' - Tk') = 1194.09
Tgrf'vtul := Т1w' + Квт*(Т1w' - Tk') = 1097.74
ω := (3.14*n)/30 = 1471.09
r1 := 0.2095
u := ω*r1 = 308.193
u^2 = 94983.1
Lper := 0.1165
Lcr := 0.0955
Lkor := 0.0745
ΔΤцпер := (u^2*Lper)/(1100*r1) = 48.0171
ΔΤцср := (u^2*Lcr)/(1100*r1) = 39.3616
ΔΤцk := (u^2*Lkor)/(1100*r1) = 30.7062
ΔΤзак := 70
ΔΤконв := 20
Тохл''per := Tk' + (-ΔΤзак) + ΔΤцпер + ΔΤконв = 686.317
Тохл''cr := Tk' + (-ΔΤзак) + ΔΤцср + ΔΤконв = 677.662
Тохл''к := Tk' + (-ΔΤзак) + ΔΤцk + ΔΤконв = 669.006
Qper := (Tgrf'per - 1080)/(Tgrf'per - Тохл''per) = 0.115611
Qcr := (Tgrf'CP - 1080)/(Tgrf'CP - Тохл''cr) = 0.220914
Qk := (Tgrf'vtul - 1080)/(Tgrf'vtul - Тохл''cr) = 0.0422416
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ρг := Pв/(R1*Tgrf'CP) = 2.22649
Reкр := 1.5*10^5
μг := 47.2*10^-6
wпер := 181
wср := 224.9
wк := 280.4
Given
ρг*wпер*Xкпер/μг == 1.6*Reкр
Xкпер := Find(Xкпер) → 0.0281095263753
Given
ρг*wср*Xкср/μг == 1.6*Reкр
Xкср := Find(Xкср) → 0.0226226068205
Given
ρг*wк*Xкк/μг == 1.6*Reкр
Xкк := Find(Xкк) → 0.0181448797216
Xкпер = 0.0281095
Xкср = 0.0226226
Xкк = 0.0181449
