z := 86
r := 0.268
W1u := 169.7
P1 := 0.796*10^6
C2a := 180.2
W2u := 468.2
P2 := 0.577*10^6
C1a := 173
Gв := 28.6
hл := 0.045
Pа := (2*π*r/z*(P1 - P2)) + (Gв/(hл*z)*(C1a - C2a)) = 4234.85
Pu := (Gв/(hл*z)*(W1u + W2u)) = 4714.2
